// COMSOL Multiphysics 6.0.0.405 model "particle tracing micromixer -without RUN.mph"
// Outline of the model tree

Functions
  rm1: Ramp | slope = 100; smoothzonecutoff = 0.001

Variables
  var1 "Variables 1"
    uin = 0.02[m/s]*rm1(t[1/s])  // Inlet velocity

Selections
  sel1: Explicit "Pair boundaries" on boundaries 33-36

Pairs
  ap1: Identity "Identity Boundary Pair 1" | source: boundaries 15-18; destination: boundaries 33-36

Common definitions
  rot1: RotatingDomain on domains 2
    rotationType = rotationalVelocity
    rotationalVelocityExpression = generalRevolutionsPerTime
    revolutionsPerTime = 1

Geometry
  geom1 "Geometry 1" (2D, length unit mm)
    c1: Circle | r = 3
    c2: Circle | r = 2.75
    dif1: Difference | input = c1; input2 = c2
    c3: Circle | r = 2.75
    r1: Rectangle | base = center; size = {0.2, 5.25}
    r2: Rectangle | base = center; size = {5.25, 0.2}
    r3: Rectangle | pos = {-3.4, 0}; base = center; size = {1, 0.5}
    rot1: Rotate | input = r3; keep = on; rot = {90, 180, 270}
    uni1: Union | input = dif1, r3, rot1; intbnd = off; edge = all
    dif2: Difference | input = c3; input2 = r1, r2
    fin: Finalize "Form Assembly" | action = assembly
  pgeom_fpt "Geometry" (1D, length unit m)
    pt1: Point

Materials
  mat1: Common "Material 1" on all domains
    def "Basic"
      density = 1E3
      dynamicviscosity = 1E-3

Physics
  spf: LaminarFlow on all domains
    dependent variable u = {u, v, w}
    fp1: FluidProperties (default)
    init1: init "Initial Values 1" (default)
    wallbc1: WallBC "Wall 1" (default)
    dcont1: Continuity "Flow Continuity 1" (default)
    inl1: InletBoundary "Inlet 1" on boundaries 1, 5, 12 | U0in = uin
    out1: OutletBoundary "Outlet 1" on boundaries 7
    cont1: Continuity "Flow Continuity 1a" on all boundaries | pairs = ap1
  fpt: FluidParticleTracing "Particle Tracing for Fluid Flow" on domains 1, 2
    dependent variable q = {qx, qy, qz}
    wall1: Wall (default) | WallCondition = Bounce
    dpcon1: PairContinuity "Particle Continuity 1" (default)
    pp1: ParticleProperties | dp = 10[um]; rhop_mat = userdef; rhop = 2200[kg/m^3]
    df1: DragForce on all domains
      u_src = root.comp1.u
      mu_mat = root.comp1.spf.mu
      IncludeVirtualMassAndPressureGradientForces = 1
    pcon1: PairContinuity "Particle Continuity 1a" on all boundaries | pairs = ap1
    inl1: Inlet on boundaries 1
      rt = range(0,0.05,1)
      InitialPosition = UniformDistribution
      N = 50
      u_src = root.comp1.u
    inl2: Inlet on boundaries 1, 5
      rt = range(0,0.05,1)
      InitialPosition = UniformDistribution
      N = 50
      u_src = root.comp1.u
    inl3: Inlet on boundaries 1, 5, 12
      rt = range(0,0.05,1)
      InitialPosition = UniformDistribution
      N = 50
      u_src = root.comp1.u
    out1: Outlet on boundaries 7

Mesh
  mesh1 "Mesh 1"
    size: MeshSizeDefault | hauto = 3
    edg1: Edge on all boundaries
      size1: Size on boundaries 1-36 | hauto = 1
    ftri1: FreeTri "Free Triangular 1" on remaining entities

Studies
  std1 "Study 1"
    time: Transient "Time Dependent" | tlist = range(0,0.02,2); usertol = on

Solver configurations
  sol1 "Solution 1" (study std1)
    v1: Variables "Dependent Variables 1"
    t1: Time "Time-Dependent Solver 1"
      tlist = range(0,0.02,2)
      atolglobalfactor = 0.05
      atolmethod = {comp1_p, scaled, comp1_qfpt, global, comp1_u, global, comp1_ode1, global}
      atolvaluemethod = {comp1_p, factor, comp1_qfpt, factor, comp1_u, factor, comp1_ode1, factor}
      atolfactor = {comp1_p, 1, comp1_qfpt, 0.1, comp1_u, 0.1, comp1_ode1, 0.1}
      timemethod = genalpha
      maxorder = 2
      stabcntrl = on
      bwinitstepfrac = 0.01
      estrat = exclude
      tstepsgenalpha = strict
      rhoinf = 0.5
      predictor = constant
      se1: Segregated | maxsegiter = 10; ntolfact = 0.5; segstabacc = segaacc; segaaccdim = 5; segaaccmix = 0.9
        ss1: SegregatedStep "Particle Tracing for Fluid Flow"
          segvar = {comp1_qfpt}
          linsolver = d1
          subdamp = 0.8
          subjtech = once
        ss2: SegregatedStep "Angular displacement"
          segvar = {comp1_ode1}
          linsolver = d2
          subjtech = onevery
          subntolfact = 0.1
        ss3: SegregatedStep "Velocity u, Pressure p"
          segvar = {comp1_u, comp1_p}
          linsolver = d3
          subdamp = 0.8
          subjtech = once
      d1: Direct
      d2: Direct "Direct, angular displacement" | linsolver = pardiso; pivotperturb = 1.0E-13
      d3: Direct "Direct, fluid flow variables (spf)" | linsolver = pardiso; pivotperturb = 1.0E-13

Datasets
  dset1: Solution | solution = sol1
  part1: Particle
    solution = sol1
    pgeomspec = fromphysics
    pgeom = pgeom_fpt
    posdof = {comp1.qx, comp1.qy}
    physicsinterface = fpt

Plots
  pg1: PlotGroup2D "Velocity (spf)" | data = dset1
    surf1: Surface | expr = spf.U
  pg2: PlotGroup2D "Pressure (spf)" | data = dset1
    con1: Contour | expr = p; levelrounding = off
  pg3: PlotGroup2D "Particle Trajectories (fpt)" | data = part1
    traj1: ParticleTrajectories | linetype = none; pointtype = point
      col1: Color "Color Expression 1" | expr = fpt.prf; descr = Particle release feature

Exports
  anim1: Animation
    target = player
    giffilename = C:\Users\chakr\OneDrive\Desktop\Mech Engg\COMSOL MULTIPHYSICS\application_library1\micromixer.gif
    frametime = 0.5
  anim2: Animation
    giffilename = C:\Users\chakr\OneDrive\Desktop\Mech Engg\COMSOL MULTIPHYSICS\application_library1\Micromixer_Vel_Profile.gif
    frametime = 0.5
  anim3: Animation
    giffilename = C:\Users\chakr\OneDrive\Desktop\Mech Engg\COMSOL MULTIPHYSICS\application_library1\Micromixer_Pressure_Profile.gif
    frametime = 1
  anim4: Animation | target = player; framesel = all